<?xml version="1.0"?>
<?xml-stylesheet type="text/xsl" href="http://jsbsim.sourceforge.net/JSBSim.xsl"?>
<fdm_config name="c172" version="2.0" release="BETA"
            xmlns:xsi="http://www.w3.org/2001/XMLSchema-instance"
            xsi:noNamespaceSchemaLocation="http://jsbsim.sourceforge.net/JSBSim.xsd">

	<fileheader>
		<author>Unknown</author>
		<filecreationdate>2002-01-01</filecreationdate>
		<version>$Id$</version>
		<description>Cessna C-172r</description>
	</fileheader>

	<metrics>
		<wingarea unit="FT2">174</wingarea>
		<wingspan unit="FT">36.1</wingspan>
		<chord unit="FT">4.9</chord>
		<htailarea unit="FT2">21.9</htailarea>
		<htailarm unit="FT">15.7</htailarm>
		<vtailarea unit="FT2">16.5</vtailarea>
		<vtailarm unit="FT">0</vtailarm>
		<location name="AERORP" unit="IN">
			<x>40.6</x>
			<y>0</y>
			<z>59.4</z>
		</location>
		<location name="EYEPOINT" unit="IN">
			<x>37</x>
			<y>0</y>
			<z>48</z>
		</location>
		<location name="VRP" unit="IN">
			<x>42.6</x>
			<y>0</y>
			<z>38.5</z>
		</location>
	</metrics>

	<mass_balance>
		<ixx unit="SLUG*FT2">948</ixx>
		<iyy unit="SLUG*FT2">1346</iyy>
		<izz unit="SLUG*FT2">1967</izz>
		<emptywt unit="LBS">1620</emptywt>
		<location name="CG" unit="IN">
			<x>39</x>
			<y>0</y>
			<z>36.5</z>
		</location>
		<pointmass name="name">
			<weight unit="LBS">180</weight>
			<location name="POINTMASS" unit="IN">
				<x>36</x>
				<y>-14</y>
				<z>24</z>
			</location>
		</pointmass>
		<pointmass name="name">
			<weight unit="LBS">180</weight>
			<location name="POINTMASS" unit="IN">
				<x>36</x>
				<y>14</y>
				<z>24</z>
			</location>
		</pointmass>
		<pointmass name="name">
			<weight unit="LBS">120</weight>
			<location name="POINTMASS" unit="IN">
				<x>95</x>
				<y>0</y>
				<z>24</z>
			</location>
		</pointmass>
	</mass_balance>

	<ground_reactions>
		<contact type="BOGEY" name="NOSE">
			<location unit="IN">
				<x>-6.8</x>
				<y>0</y>
				<z>-20</z>
			</location>
			<static_friction>0.8</static_friction>
			<dynamic_friction>0.5</dynamic_friction>
			<rolling_friction>0.02</rolling_friction>
			<spring_coeff unit="LBS/FT">1800</spring_coeff>
			<damping_coeff unit="LBS/FT/SEC">600</damping_coeff>
			<max_steer unit="DEG">10</max_steer>
			<brake_group>NONE</brake_group>
			<retractable>0</retractable>
		</contact>
		<contact type="BOGEY" name="LEFT_MAIN">
			<location unit="IN">
				<x>58.2</x>
				<y>-43</y>
				<z>-17.9</z>
			</location>
			<static_friction>0.8</static_friction>
			<dynamic_friction>0.5</dynamic_friction>
			<rolling_friction>0.02</rolling_friction>
			<spring_coeff unit="LBS/FT">5400</spring_coeff>
			<damping_coeff unit="LBS/FT/SEC">1600</damping_coeff>
			<max_steer unit="DEG">0.0</max_steer>
			<brake_group>LEFT</brake_group>
			<retractable>0</retractable>
		</contact>
		<contact type="BOGEY" name="RIGHT_MAIN">
			<location unit="IN">
				<x>58.2</x>
				<y>43</y>
				<z>-17.9</z>
			</location>
			<static_friction>0.8</static_friction>
			<dynamic_friction>0.5</dynamic_friction>
			<rolling_friction>0.02</rolling_friction>
			<spring_coeff unit="LBS/FT">5400</spring_coeff>
			<damping_coeff unit="LBS/FT/SEC">1600</damping_coeff>
			<max_steer unit="DEG">0.0</max_steer>
			<brake_group>RIGHT</brake_group>
			<retractable>0</retractable>
		</contact>
		<contact type="BOGEY" name="TAIL_SKID">
			<location unit="IN">
				<x>188</x>
				<y>0</y>
				<z>8</z>
			</location>
			<static_friction>0.2</static_friction>
			<dynamic_friction>0.2</dynamic_friction>
			<rolling_friction>0.2</rolling_friction>
			<spring_coeff unit="LBS/FT">20000</spring_coeff>
			<damping_coeff unit="LBS/FT/SEC">1000</damping_coeff>
			<max_steer unit="DEG">0.0</max_steer>
			<brake_group>NONE</brake_group>
			<retractable>0</retractable>
		</contact>
		<contact type="BOGEY" name="LEFT_TIP">
			<location unit="IN">
				<x>43.2</x>
				<y>-214.8</y>
				<z>59.4</z>
			</location>
			<static_friction>0.2</static_friction>
			<dynamic_friction>0.2</dynamic_friction>
			<rolling_friction>0.2</rolling_friction>
			<spring_coeff unit="LBS/FT">10000</spring_coeff>
			<damping_coeff unit="LBS/FT/SEC">2000</damping_coeff>
			<max_steer unit="DEG">0.0</max_steer>
			<brake_group>NONE</brake_group>
			<retractable>0</retractable>
		</contact>
		<contact type="BOGEY" name="RIGHT_TIP">
			<location unit="IN">
				<x>43.2</x>
				<y>214.8</y>
				<z>59.4</z>
			</location>
			<static_friction>0.2</static_friction>
			<dynamic_friction>0.2</dynamic_friction>
			<rolling_friction>0.2</rolling_friction>
			<spring_coeff unit="LBS/FT">10000</spring_coeff>
			<damping_coeff unit="LBS/FT/SEC">2000</damping_coeff>
			<max_steer unit="DEG">0.0</max_steer>
			<brake_group>NONE</brake_group>
			<retractable>0</retractable>
		</contact>
	</ground_reactions>
	<propulsion>
		<engine file="engIO360C">
			<feed>0</feed>
			<feed>1</feed>
			<thruster file="prop_Clark_Y7570">
				<sense>1</sense>
				<p_factor>10</p_factor>
			</thruster>
		</engine>
		<tank type="FUEL"><!-- Tank number 0 -->
			<location unit="IN">
				<x>48</x>
				<y>-112</y>
				<z>59.4</z>
			</location>
			<capacity unit="LBS">168</capacity>
			<contents unit="LBS">168</contents>
		</tank>
		<tank type="FUEL"><!-- Tank number 1 -->
			<location unit="IN">
				<x>48</x>
				<y>112</y>
				<z>59.4</z>
			</location>
			<capacity unit="LBS">168</capacity>
			<contents unit="LBS">168</contents>
		</tank>
	</propulsion>
	<flight_control name="FCS: c172">
		<channel name="Pitch">
			<summer name="Pitch Trim Sum">
				<input>fcs/elevator-cmd-norm</input>
				<input>fcs/pitch-trim-cmd-norm</input>
				<clipto>
					<min>-1</min>
					<max>1</max>
				</clipto>
			</summer>

			<aerosurface_scale name="Elevator Control">
				<input>fcs/pitch-trim-sum</input>
				<gain>0.01745</gain>
				<range>
					<min>-28</min>
					<max>23</max>
				</range>
				<output>fcs/elevator-pos-rad</output>
			</aerosurface_scale>

			<aerosurface_scale name="Elevator Position Normalized">
				<input>fcs/elevator-pos-deg</input>
				<domain>
					<min>-28</min>
					<max>23</max>
				</domain>
				<range>
					<min>-1</min>
					<max>1</max>
				</range>
				<output>fcs/elevator-pos-norm</output>
			</aerosurface_scale>
		</channel>

		<channel name="Roll">

			<!-- Aileron sign convention

		This varies when considering the combined effects of both the port (left wing) and starboard (right wing) ailerons, or the
		ailerons on each wing individually.

		For combined effect of ailerons on both wings
				Yoke/joystick moved to the right is +ve aileron, and the ailerons move diffentially.
					The port aileron(s) go down, and the starboard aileron(s) go up.
					This results in +ve rate of roll, and a turn to the right.
					The difference between port and starboard aileron angles is used for calculating roll and yaw moments.
		For individual ailerons
				+ve aileron surface angle is upwards, for both port and starboard ailerons.
				The individual aileron angles are used for animation. -->

			<summer name="aileron-cmd-sum">
				<input>fcs/aileron-cmd-norm</input>
				<input>fcs/roll-trim-cmd-norm</input>
				<clipto><min>-1</min><max>1</max></clipto>
				<output>fcs/aileron-cmd-sum</output>
			</summer>

			<aerosurface_scale name="left-aileron-pos-deg">
				<input>fcs/aileron-cmd-sum</input>
				<range><min>-15.0</min><max>20.0</max></range>
				<output>fcs/left-aileron-pos-deg</output>
			</aerosurface_scale>

			<aerosurface_scale name="Left Aileron Position Normalized">
				<input>fcs/left-aileron-pos-deg</input>
				<domain><min>-20</min><max>15</max></domain>
				<range><min>-1</min><max>1</max></range>
				<output>fcs/left-aileron-pos-norm</output>
			</aerosurface_scale>

			<aerosurface_scale name="right-aileron-pos-deg">
				<input>-fcs/aileron-cmd-sum</input>
				<range><min>-15.0</min><max>20.0</max></range>
				<output>fcs/right-aileron-pos-deg</output>
			</aerosurface_scale>

			<aerosurface_scale name="Right Aileron Position Normalized">
				<input>fcs/right-aileron-pos-deg</input>
				<domain><min>-20</min><max>15</max></domain>
				<range><min>-1</min><max>1</max></range>
				<output>fcs/right-aileron-pos-norm</output>
			</aerosurface_scale>

			<summer name="aileron-difference-deg">
				<input>-fcs/right-aileron-pos-deg</input>
				<input>fcs/left-aileron-pos-deg</input>
				<clipto><min>-35</min><max>35</max></clipto>
				<output>fcs/aileron-difference-deg</output>
			</summer>
		</channel>

		<channel name="Yaw">
			<summer name="Rudder Command Sum">
				<input>fcs/rudder-cmd-norm</input>
				<input>fcs/yaw-trim-cmd-norm</input>
				<clipto>
					<min>-1</min>
					<max>1</max>
				</clipto>
				<output>fcs/rudder-command-sum</output>
			</summer>

			<aerosurface_scale name="Rudder Control">
				<input>fcs/rudder-command-sum</input>
				<gain>0.01745</gain>
				<range>
					<min>-16</min>
					<max>16</max>
				</range>
				<output>fcs/rudder-pos-rad</output>
			</aerosurface_scale>

			<aerosurface_scale name="Rudder Position Normalized">
				<input>fcs/rudder-pos-deg</input>
				<domain>
					<min>-16</min>
					<max>16</max>
				</domain>
				<range>
					<min>-1</min>
					<max>1</max>
				</range>
				<output>fcs/rudder-pos-norm</output>
			</aerosurface_scale>
		</channel>

		<channel name="Flaps">
			<kinematic name="Flaps Control">
				<input>fcs/flap-cmd-norm</input>
				<traverse>
					<setting>
						<position>0</position>
						<time>0</time>
					</setting>
					<setting>
						<position>10</position>
						<time>2</time>
					</setting>
					<setting>
						<position>20</position>
						<time>1</time>
					</setting>
					<setting>
						<position>30</position>
						<time>1</time>
					</setting>
				</traverse>
				<output>fcs/flap-pos-deg</output>
			</kinematic>
			<aerosurface_scale name="Flap Position Normalizer">
				<input>fcs/flap-pos-deg</input>
				<domain>
					<min>0</min><!-- Flaps actual minimum position -->
					<max>30</max><!-- Flaps actual maximum position -->
				</domain>
				<range>
					<min>0</min><!-- Flaps normalized minimum position -->
					<max>1</max><!-- Flaps normalized maximum position -->
				</range>
				<output>fcs/flap-pos-norm</output>
			</aerosurface_scale>
		</channel>

	</flight_control>

	<aerodynamics>
		<axis name="LIFT">

			<function name="aero/force/Lift_alpha">
				<description>Lift_due_to_alpha</description>
				<product>
					<property>aero/qbar-psf</property>
					<property>metrics/Sw-sqft</property>
					<table name="aero/coefficient/CL_alpha">
						<independentVar lookup="row">aero/alpha-deg</independentVar>
						<independentVar lookup="column">aero/Re</independentVar>
						<tableData>
								1.834E+06	2.873E+06	3.728E+06	4.889E+06	7.456E+06
						-10		-0.823		-0.824		-0.826		-0.828		-0.830
						-7.5	-0.560		-0.561		-0.562		-0.563		-0.566
						-5		-0.316		-0.316		-0.317		-0.318		-0.320
						-2.5	-0.082		-0.082		-0.082		-0.083		-0.083
						0		0.147		0.147		0.147		0.148		0.149
						2.5		0.388		0.389		0.389		0.390		0.393
						5		0.643		0.644		0.645		0.646		0.648
						7.5		0.907		0.909		0.910		0.912		0.913
						10		1.181		1.182		1.184		.186		1.185
						15		1.642		1.643		1.644		1.646		1.604
						17		1.773		1.774		1.775		1.776		1.717
						18		1.825		1.826		1.827		1.828		1.760
						19.5	1.884		1.884		1.885		1.886		1.754
						20		1.900		1.899		1.898		1.896		1.742
						22.5	1.664		1.653		1.640		1.616		1.084
						25		0.568		0.568		0.567		0.565		0.415
						</tableData>
					</table>
				</product>
			</function>

			<function name="aero/force/Lift_flap">
				<description>Lift_due_to_flaps</description>
				<product>
					<property>aero/qbar-psf</property>
					<property>metrics/Sw-sqft</property>
					<table name="aero/coefficient/CL_Flap">
						<independentVar>fcs/flap-pos-deg</independentVar>
						<tableData>
						0	0
						10	0.144
						20	0.279
						30	0.394
						40	0.468
						</tableData>
					</table>
				</product>
			</function>

			<function name="aero/force/Lift_ground_effect">
				<description>Lift_due_ground_effect</description>
				<product>
					<property>aero/qbar-psf</property>
					<property>metrics/Sw-sqft</property>
					<table name="aero/coefficient/CL_ground_effect">
						<independentVar lookup="row">aero/alpha-deg</independentVar>
						<independentVar lookup="column">position/h-agl-ft</independentVar>
						<tableData>
							2.0		3.0		4.0		5.0		10.0	20.0	50.00
					-10		-0.0750	-0.0630	-0.0540	-0.0480	-0.0310	-0.0560	0.00
					-7.5	-0.0510	-0.0430	-0.0370	-0.0320	-0.0210	-0.0380	0.00
					-5		-0.0230	-0.0200	-0.0170	-0.0150	-0.0100	-0.0190	0.00
					-2.5	-0.0040	-0.0040	-0.0030	-0.0030	-0.0020	-0.0040	0.00
					0		0.0150	0.0120	0.0110	0.0090	0.0050	0.0070	0.00
					2.5		0.0340	0.0290	0.0250	0.0220	0.0110	0.0070	0.00
					5		0.0540	0.0470	0.0400	0.0350	0.0140	-0.0050	0.00
					7.5		0.0760	0.0650	0.0550	0.0490	0.0200	-0.0070	0.00
					10		0.0850	0.0730	0.0630	0.0550	0.0260	0.0070	0.00
					15		0.0910	0.0790	0.0670	0.0590	0.0320	0.0270	0.00
					17		0.0910	0.0780	0.0660	0.0580	0.0320	0.0270	0.00
						</tableData>
					</table>
				</product>
			</function>

			<function name="aero/force/Lift_q">
				<description>Lift due to pitch rate</description>
				<product>
					<property>velocities/q-aero-rad_sec</property>
					<property>aero/qbar-psf</property>
					<property>metrics/Sw-sqft</property>
					<property>aero/ci2vel</property>
					<table name="aero/derivative/CL_q">
						<independentVar lookup="row">aero/Re</independentVar>
						<tableData>
							1833598.5	7.7740
							2872562.1	7.8090
							3728241.4	7.8340
							4889444.9	7.8670
							7456000.0	7.8770
						</tableData>
					</table>
				</product>
			</function>

			<function name="aero/force/Lift_alphadot">
				<description>Lift due to AOA rate</description>
				<product>
					<property>aero/alphadot-rad_sec</property>
					<property>aero/qbar-psf</property>
					<property>metrics/Sw-sqft</property>
					<property>aero/ci2vel</property>
					<table name="aero/derivative/CL_ad">
						<independentVar lookup="row">aero/alpha-deg</independentVar>
						<tableData>
							-10		2.8860
							-7.5	2.7480
							-5		2.8810
							-2.5	2.8500
							0		2.8150
							2.5		2.8250
							5		2.8270
							7.5		2.7200
							10		2.4180
							15		1.5280
							17		1.0490
							18		0.7583
							19.5	0.0451
							20		-0.5465
							22.5	-4.9760
							25		-7.2510
						</tableData>
					</table>
				</product>
			</function>

			<function name="aero/force/Lift_elevator">
				<description>
				Lift due to Elevator Deflection
				Positive surface deflection is trailing edge down
				</description>
				<product>
					<property>aero/qbar-psf</property>
					<property>metrics/Sw-sqft</property>
					<table name="aero/coefficient/CL_Elevator">
						<independentVar lookup="row">fcs/elevator-pos-deg</independentVar>
						<tableData>
						-26		-0.138
						-20		-0.128
						-10		-0.087
						-5		-0.044
						0		0
						7.5		0.065
						15		0.122
						22.5	0.13
						28		0.143
						</tableData>
					</table>
				</product>
			</function>

		</axis>

		<axis name="DRAG">

			<function name="aero/force/Drag_alpha">
				<description>Drag_due_to_alpha</description>
				<product>
					<property>aero/qbar-psf</property>
					<property>metrics/Sw-sqft</property>
					<table name="aero/coefficient/CD_alpha">
						<independentVar lookup="row">aero/alpha-deg</independentVar>
						<independentVar lookup="column">aero/Re</independentVar>
						<tableData>
							1.834E+06	2.873E+06	3.728E+06	4.889E+06	7.456E+06
						-10		0.0520	0.0500		0.0490		0.0480		0.0470
						-7.5	0.0350	0.0330		0.0320		0.0320		0.0300
						-5		0.0260	0.0240		0.0230		0.0220		0.0210
						-2.5	0.0210	0.0200		0.0190		0.0180		0.0160
						0		0.0220	0.0200		0.0190		0.0180		0.0170
						2.5		0.0280	0.0260		0.0250		0.0240		0.0230
						5		0.0400	0.0380		0.0370		0.0360		0.0350
						7.5		0.0580	0.0570		0.0560		0.0550		0.0540
						10		0.0840	0.0820		0.0810		0.0810		0.0790
						15		0.1410	0.1390		0.1380		0.1380		0.1310
						17		0.1610	0.1590		0.1580		0.1580		0.1480
						18		0.1700	0.1680		0.1670		0.1660		0.1550
						19.5	0.1810	0.1790		0.1780		0.1780		0.1560
						20		0.1850	0.1820		0.1810		0.1790		0.1550
						22.5	0.1550	0.1520		0.1490		0.1460		0.0930
						25		0.0860	0.0840		0.0830		0.0820		0.0740
						</tableData>
					</table>
				</product>
			</function>
			<function name="aero/force/Drag_DATCOM correction">
				<description>Drag additions to align different references</description>
				<product>
					<property>aero/qbar-psf</property>
					<property>metrics/Sw-sqft</property>
					<table name="aero/coefficient/CD_corr">
						<independentVar>aero/Re</independentVar>
						<tableData>
							1.83E+06  0.0134
							2.87E+06  0.0139
							3.73E+06  0.0139
							4.89E+06  0.0138
							7.46E+06  0.0134
						</tableData>
					</table>
				</product>
			</function>
			<function name="aero/force/Drag_ground_effect">
				<description>Drag_due_ground_effect</description>
				<product>
					<property>aero/qbar-psf</property>
					<property>metrics/Sw-sqft</property>
					<table name="aero/coefficient/CD_ground_effect">
						<independentVar lookup="row">aero/alpha-deg</independentVar>
						<independentVar lookup="column">position/h-agl-ft</independentVar>
						<tableData>
							2.0		3.0		4.0		5.0		10.0	20.0	50.00
					-10		-0.0020	-0.0020	-0.0020	-0.0020	-0.0010	0.0000	0.00
					-7.5	-0.0010	-0.0010	-0.0010	-0.0010	-0.0010	0.0000	0.00
					-5		0.0000	0.0000	0.0000	0.0000	0.0000	0.0000	0.00
					-2.5	0.0000	0.0000	0.0000	0.0000	0.0000	0.0000	0.00
					0		-0.0010	-0.0010	-0.0010	0.0000	0.0000	0.0000	0.00
					2.5		-0.0010	0.0000	0.0000	0.0000	0.0000	0.0000	0.00
					5		-0.0030	-0.0030	-0.0030	-0.0020	-0.0020	-0.0010	0.00
					7.5		-0.0050	-0.0050	-0.0040	-0.0040	-0.0020	-0.0010	0.00
					10		-0.0080	-0.0070	-0.0060	-0.0050	-0.0030	-0.0010	0.00
					15		-0.0160	-0.0140	-0.0130	-0.0110	-0.0070	-0.0030	0.00
					17		-0.0180	-0.0160	-0.0140	-0.0130	-0.0070	-0.0030	0.00
						</tableData>
					</table>
				</product>
			</function>

			<function name="aero/force/Drag_elevator">
				<description>Drag due to Elevator Deflection</description>
				<product>
					<property>aero/qbar-psf</property>
					<property>metrics/Sw-sqft</property>
					<table name="aero/coefficient/CD_elevator">
						<independentVar lookup="column">fcs/elevator-pos-deg</independentVar>
						<independentVar lookup="row">aero/alpha-deg</independentVar>
						<tableData>
				-26		-20			-10			-5			0		7.5			15			22.5	28
			-10	0.01210	0.01080		0.00621		-0.00250	0.00000	-0.00149	-0.00057	0.00028	0.00030
			-5	0.00944	0.00835		0.00452		0.00166		0.00000	-0.00023	0.00181		0.00224	0.00308
			0	0.00657	0.00569		0.00272		0.00075		0.00000	0.00113		0.00435		0.00494	0.00606
			5	0.00367	0.00300		0.00089		-0.00016	0.00000	0.00250		0.00692		0.00767	0.00906
			10	0.00067	0.00021		-0.00100	-0.00110	0.00000	0.00392		0.00958		0.01050	0.01220
			15	-0.00302 -0.00321 -0.00332 		-0.00226 	0.00001	0.00566		0.01280		0.01400	0.01600
			20	-0.00791 -0.00775 -0.00640		-0.00380 	0.00001 0.00797 	0.01720 	0.01860 0.02110
			25	-0.01870 -0.01780 -0.01320		-0.00720 	0.00002 0.01310 	0.02670 	0.02870 0.03230
						</tableData>
					</table>
				</product>
			</function>


			<function name="aero/force/Drag_flap">
				<description>Drag due to flaps</description>
				<product>
					<property>aero/qbar-psf</property>
					<property>metrics/Sw-sqft</property>
					<table name="aero/coefficient/CD_flap">
						<independentVar lookup="column">fcs/flap-pos-deg</independentVar>
						<independentVar lookup="row">aero/alpha-deg</independentVar>
						<tableData>
							0		10		20		30		40
						-10	0.0000	-0.0087	-0.0138	-0.0157	-0.0157
						0	0.0000	0.0024	0.0078	0.0148	0.0205
						10	0.0000	0.0135	0.0294	0.0453	0.0567
						20	0.0000	0.0247	0.0510	0.0757	0.0930
						25	0.0000	0.0302	0.0618	0.0910	0.1110
						</tableData>
					</table>
				</product>
			</function>

		</axis>

		<axis name="PITCH">

			<function name="aero/force/Pitch_alpha">
				<description>Pitch_due_to_alpha</description>
				<product>
					<property>aero/qbar-psf</property>
					<property>metrics/Sw-sqft</property>
					<property>metrics/cbarw-ft</property>
					<table name="aero/coefficient/CM_alpha">
						<independentVar lookup="row">aero/alpha-deg</independentVar>
						<tableData>
						-10		0.1373
						-7.5	0.1011
						-5		0.0862
						-2.5	0.0548
						0		0.0154
						2.5		-0.0289
						5		-0.0799
						7.5		-0.1382
						10		-0.2117
						15		-0.4060
						17		-0.5014
						18		-0.5527
						19.5	-0.6358
						</tableData>
					</table>
				</product>
			</function>

			<function name="aero/force/PitchMoment_flap">
				<description>PitchMoment_due_to_flaps</description>
				<product>
					<property>aero/qbar-psf</property>
					<property>metrics/Sw-sqft</property>
					<property>metrics/cbarw-ft</property>
					<table name="aero/coefficient/CM_Flap">
						<independentVar lookup="column">aero/alpha-deg</independentVar>
						<independentVar lookup="row">fcs/flap-pos-deg</independentVar>
            					<tableData>
								0	2	4	6	8	10	12	14	16
							0	0.0000	0.0000	0.0000	0.0000	0.0000	0.0000	0.0000	0.0000	0.0000
							10	-0.0236	-0.0137	-0.0039	0.0054	0.0174	0.0310	0.0447	0.0569	0.0572
							20	-0.0237	-0.0095	0.0029	0.0119	0.0237	0.0362	0.0496	0.0608	0.0600
							30	-0.0171	-0.0036	0.0059	0.0144	0.0250	0.0370	0.0476	0.0591	0.0568
							40	-0.0198	-0.0090	-0.0005	0.0073	0.0172	0.0262	0.0372	0.0446	0.0409
						</tableData>
					</table>
				</product>
			</function>

			<function name="aero/moment/Pitch_ground_effect">
				<description>Pitch Moment_due_ground_effect</description>
				<product>
					<property>aero/qbar-psf</property>
					<property>metrics/Sw-sqft</property>
					<property>metrics/cbarw-ft</property>
					<table name="aero/coefficient/CM_ground_effect">
						<independentVar lookup="row">aero/alpha-deg</independentVar>
						<independentVar lookup="column">position/h-agl-ft</independentVar>
						<tableData>
						2.0		3.0		4.0		5.0		10.0	20.0
				-10		0.1974	0.1881	0.1806	0.1746	0.1573	0.1460
				-7.5	0.1395	0.1335	0.1287	0.1249	0.1138	0.1065
				-5		0.0988	0.0969	0.0953	0.0941	0.0905	0.0882
				-2.5	0.0564	0.0561	0.0559	0.0557	0.0550	0.0546
				0		0.0028	0.0047	0.0063	0.0075	0.0110	0.0134
				2.5		-0.0560	-0.0519	-0.0486	-0.0459	-0.0380	-0.0329
				5		-0.1219	-0.1154	-0.1102	-0.1060	-0.0938	-0.0858
				7.5		-0.2032	-0.1926	-0.1847	-0.1784	-0.1597	-0.1472
				10		-0.3049	-0.2914	-0.2803	-0.2712	-0.2440	-0.2252
				15		-0.5493	-0.5286	-0.5112	-0.4974	-0.4559	-0.4272
				17		-0.6756	-0.6482	-0.6246	-0.6082	-0.5598	-0.5257
						</tableData>
					</table>
				</product>
			</function>

			<function name="aero/moment/Pitch_elevator">
				<description>Pitch moment due to elevator</description>
				<product>
					<property>aero/qbar-psf</property>
					<property>metrics/Sw-sqft</property>
					<property>metrics/cbarw-ft</property>
					<table name="aero/coefficient/CM_elevator">
						<independentVar lookup="row">fcs/elevator-pos-deg</independentVar>
						<tableData>
						-26	0.2847
						-20	0.263
						-10	0.176
						-5	0.088
						0	-0.0002
						7.5	-0.132
						15	-0.2479
						22.5	-0.268
						28	-0.2971
						</tableData>
					</table>
				</product>
			</function>

			<function name="aero/moment/Pitch_damp">
				<description>Pitch moment due to pitch rate</description>
				<product>
					<property>aero/qbar-psf</property>
					<property>metrics/Sw-sqft</property>
					<property>metrics/cbarw-ft</property>
					<property>aero/ci2vel</property>
					<property>velocities/q-aero-rad_sec</property>
					<table name="aero/coefficient/CM_q">
						<independentVar lookup="row">aero/Re</independentVar>
						<tableData>
							1833598.5	-16.0600
							2872562.1	-16.1500
							3728241.4	-16.2100
							4889444.9	-16.2800
							7456000.0	-16.2400
						</tableData>
					</table>
				</product>
			</function>

			<function name="aero/moment/Pitch_alphadot">
				<description>Pitch moment due to alpha rate</description>
				<product>
					<property>aero/qbar-psf</property>
					<property>metrics/Sw-sqft</property>
					<property>metrics/cbarw-ft</property>
					<property>aero/ci2vel</property>
					<property>aero/alphadot-rad_sec</property>
					<table name="aero/oefficient/CM_alphadot">
						<independentVar lookup="row">aero/alpha-deg</independentVar>
						<tableData>
							-10		-8.5050
							-7.5	-8.0980
							-5		-8.4900
							-2.5	-8.4000
							0		-8.2970
							2.5		-8.3250
							5		-8.3320
							7.5		-8.0170
							10		-7.1280
							15		-4.5020
							17		-3.0900
							18		-2.2350
							19.5	-0.1329
							20		1.6110
							22.5	14.6600
							25		21.3700
						</tableData>
					</table>
				</product>
			</function>

		</axis>


		<axis name="SIDE">

			<function name="aero/force/Side_beta">
				<description>Side force due to beta</description>
				<product>
					<property>aero/qbar-psf</property>
					<property>metrics/Sw-sqft</property>
					<property>aero/beta-rad</property>
					<value>-0.29</value>
				</product>
			</function>

			<function name="aero/force/Side_roll_rate">
				<description>Side force due to roll rate</description>
				<product>
					<property>aero/qbar-psf</property>
					<property>metrics/Sw-sqft</property>
					<property>aero/bi2vel</property>
					<property>velocities/p-aero-rad_sec</property>
					<table name="aero/coefficient/CY_p">
						<independentVar lookup="row">aero/alpha-deg</independentVar>
						<tableData>
							-10		-0.0352
							-7.5	-0.0385
							-5		-0.0414
							-2.5	-0.0439
							0		-0.0462
							2.5		-0.0489
							5		-0.0518
							7.5		-0.0550
							10		-0.0588
							15		-0.0650
							17		-0.0661
							18		-0.0664
							19.5	-0.0667
							20		-0.0698
							22.5	-0.0433
							25		0.0035
						</tableData>
					</table>
				</product>
			</function>

			<function name="aero/coefficient/CYdr">
				<description>Side_force_due_to_rudder</description>
				<product>
					<property>aero/qbar-psf</property>
					<property>metrics/Sw-sqft</property>
					<property>fcs/rudder-pos-rad</property>
					<value>0.0980</value>
				</product>
			</function>

			<!--           <function name="aero/coefficient/CYp">
                Ignored by Datcom -->

			<!--           <function name="aero/coefficient/CYda">
               Ignored by Datcom -->

			<!--           <function name="aero/coefficient/CYr">
               Ignored by Datcom -->
		</axis>


		<axis name="ROLL">

			<function name="aero/moment/Roll_beta">
				<description>Roll moment due to beta</description>
				<product>
					<property>aero/qbar-psf</property>
					<property>metrics/Sw-sqft</property>
					<property>metrics/bw-ft</property>
					<property>aero/beta-rad</property>
					<table name="aero/derivative/Cl_beta">
						<independentVar lookup="row">aero/alpha-deg</independentVar>
						<tableData>
							-10		-0.1761
							-7.5	-0.1842
							-5		-0.1919
							-2.5	-0.1989
							0		-0.2056
							2.5		-0.2127
							5		-0.2204
							7.5		-0.2285
							10		-0.2370
							15		-0.2503
							17		-0.2533
							18		-0.2542
							19.5	-0.2546
							20		-0.2546
							22.5	-0.2417
							25		-0.1965
						</tableData>
					</table>
				</product>
			</function>

			<function name="aero/moment/Roll_damp">
				<description>Roll moment due to roll rate</description>
				<product>
					<property>aero/qbar-psf</property>
					<property>metrics/Sw-sqft</property>
					<property>metrics/bw-ft</property>
					<property>aero/bi2vel</property>
					<property>velocities/p-aero-rad_sec</property>
					<table name="aero/derivative/Cl_p">
						<independentVar lookup="row">aero/alpha-deg</independentVar>
						<tableData>
						-10		-0.5182
						-7.5	-0.4947
						-5		-0.4682
						-2.5	-0.4487
						0		-0.4590
						2.5		-0.4867
						5		-0.5086
						7.5		-0.5238
						10		-0.4944
						15		-0.3067
						17		-0.2098
						18		-0.1572
						19.5	-0.0672
						20		0.0727
						22.5	1.6450
						25		3.5550
						</tableData>
					</table>
				</product>
			</function>

			<function name="aero/moment/Roll_yaw_rate">
				<description>Roll moment due to yaw rate</description>
				<product>
					<property>aero/qbar-psf</property>
					<property>metrics/Sw-sqft</property>
					<property>metrics/bw-ft</property>
					<property>aero/bi2vel</property>
					<property>velocities/r-aero-rad_sec</property>
					<table name="aero/derivative/Cl_r">
						<independentVar lookup="row">aero/alpha-deg</independentVar>
						<tableData>
							-10		-0.1332
							-7.5	-0.0881
							-5		-0.0451
							-2.5	-0.0049
							0		0.0344
							2.5		0.0765
							5		0.1208
							7.5		0.1668
							10		0.2137
							15		0.2872
							17		0.3042
							18		0.3099
							19.5	0.3145
							20		0.3149
							22.5	0.2472
							25		0.0012
						</tableData>
					</table>
				</product>
			</function>

			<function name="aero/moment/Roll_aileron">
				<description>Roll moment due to aileron</description>
				<product>
					<property>aero/qbar-psf</property>
					<property>metrics/Sw-sqft</property>
					<property>metrics/bw-ft</property>
					<table name="aero/oefficient/Cl_aileron">
						<independentVar lookup="row">fcs/aileron-difference-deg</independentVar>
						<tableData>
						-35		-0.042243
						-25		-0.036229
						-15		-0.024574
						-7.5	-0.012287
						0		0
						7.5		0.0123
						15		0.0246
						25		0.0362
						35		0.0422
						</tableData>
					</table>
				</product>
			</function>

			<function name="aero/moment/Roll_rudder">
				<description>Roll moment due to rudder</description>
				<product>
					<property>aero/qbar-psf</property>
					<property>metrics/Sw-sqft</property>
					<property>metrics/bw-ft</property>
					<property>fcs/rudder-pos-deg</property>
					<value>0.000175</value>
				</product>
			</function>

		</axis>

		<axis name="YAW">
			<function name="aero/moment/Yaw_beta">
				<description>Yaw moment due to beta</description>
				<product>
					<property>aero/qbar-psf</property>
					<property>metrics/Sw-sqft</property>
					<property>metrics/bw-ft</property>
					<property>aero/beta-rad</property>
					<value>0.024</value>
				</product>
			</function>

			<function name="aero/moment/Yaw_roll_rate">
				<description>Yaw moment due to roll rate</description>
				<product>
					<property>aero/qbar-psf</property>
					<property>metrics/Sw-sqft</property>
					<property>metrics/bw-ft</property>
					<property>aero/bi2vel</property>
					<property>velocities/p-aero-rad_sec</property>
					<table name="aero/derivative/Cn_p">
						<independentVar lookup="row">aero/alpha-rad</independentVar>
						<tableData>
							-10		0.0470
							-7.5	0.0322
							-5		0.0178
							-2.5	0.0035
							0		-0.0108
							2.5		-0.0254
							5		-0.0403
							7.5		-0.0556
							10		-0.0744
							15		-0.1185
							17		-0.1348
							18		-0.1423
							19.5	-0.1526
							20		-0.1611
							22.5	-0.2092
							25		-0.1794
						</tableData>
					</table>
				</product>
			</function>

			<function name="aero/moment/Yaw_damp">
				<description>Yaw moment due to yaw rate</description>
				<product>
					<property>aero/qbar-psf</property>
					<property>metrics/Sw-sqft</property>
					<property>metrics/bw-ft</property>
					<property>aero/bi2vel</property>
					<property>velocities/r-aero-rad_sec</property>
					<table name="aero/coefficient/CN_r">
						<independentVar lookup="row">aero/alpha-rad</independentVar>
						<tableData>
						-10		-0.0499
						-7.5	-0.0475
						-5		-0.0465
						-2.5	-0.0468
						0		-0.0481
						2.5		-0.0506
						5		-0.0545
						7.5		-0.0599
						10		-0.0668
						15		-0.0808
						17		-0.0846
						18		-0.0858
						19.5	-0.0869
						20		-0.0870
						22.5	-0.0727
						25		-0.0477
						</tableData>
					</table>
				</product>
			</function>

			<!--         <function name="aero/moment/Cnda">
                <description>Yaw_moment_due_to_aileron</description>
                <product>
                    <property>aero/qbar-psf</property>
                    <property>metrics/Sw-sqft</property>
                    <property>metrics/bw-ft</property>
                    <property>fcs/left-aileron-pos-rad</property>
                    <value>0.0053</value>
                </product>
            </function> -->

			<!--         <function name="aero/moment/Cnda">
                <description>Yaw_moment_due_to_aileron</description>
                <product>
                    <property>aero/qbar-psf</property>
                    <property>metrics/Sw-sqft</property>
                    <property>metrics/bw-ft</property>
                    <property>fcs/aileron-difference-deg</property>
                    <value>0.0001034</value>
                </product>
            </function> -->


			<function name="aero/coefficient/Cnda">
				<description>aileron_yaw_moment</description>
				<product>
					<property>aero/qbar-psf</property>
					<property>metrics/Sw-sqft</property>
					<property>metrics/bw-ft</property>
<!-- C172 has Frise ailerons, but Digital Datcom only has plain ailerons,
            so reduce Datcom´s adverse yaw estimate accordingly -->
					<value>0.1</value>
					<table name="aero/coefficient/Cn_aileron">
						<independentVar lookup="column">fcs/aileron-difference-deg</independentVar>
						<independentVar lookup="row">aero/alpha-deg</independentVar>
						<tableData>
  -34.0 -26.8 -17.9 -8.9 0.0 8.9 17.9 26.8 34.0
   -10 -0.00647 -0.00497 -0.00302 -0.00151 0.00000 0.00151 0.00302 0.00497 0.00647
    -5 -0.00223 -0.00171 -0.00104 -0.00052 0.00000 0.00052 0.00104 0.00171 0.00223
    0 0.00164 0.00126 0.00076 0.00038 0.00000 -0.00038 -0.00076 -0.00126 -0.00164
    5 0.00584 0.00448 0.00272 0.00136 0.00000 -0.00136 -0.00272 -0.00448 -0.00584
   10 0.01034 0.00794 0.00483 0.00241 0.00000 -0.00241 -0.00483 -0.00794 -0.01034
   15 0.01393 0.01070 0.00650 0.00325 0.00000 -0.00325 -0.00650 -0.01070 -0.01393
   17 0.01480 0.01136 0.00690 0.00345 0.00000 -0.00345 -0.00690 -0.01136 -0.01480
   18 0.01509 0.01159 0.00704 0.00352 0.00000 -0.00352 -0.00704 -0.01159 -0.01509
   20 0.01534 0.01178 0.00716 0.00358 0.00000 -0.00358 -0.00716 -0.01178 -0.01534
   25 0.00102 0.00078 0.00048 0.00024 0.00000 -0.00024 -0.00048 -0.00078 -0.00102
						</tableData>
					</table>
				</product>
			</function>

			<function name="aero/coefficient/Cndr">
				<description>Yaw moment due to rudder</description>
				<product>
					<property>aero/qbar-psf</property>
					<property>metrics/Sw-sqft</property>
					<property>metrics/bw-ft</property>
					<property>fcs/rudder-pos-deg</property>
					<value>-0.002</value>
				</product>
			</function>

		</axis>

	</aerodynamics>

</fdm_config>
